ORIGIN ≡ 1
x := [1; 2; 3; 4]
y := [1; 4; 3; 3]
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n := last(x) = 4
m := 4
k := 1 .. n
i := 1 .. m
j := 1 .. m
SS(a_0, a_1, a_2) := sum((a_0 + a_1*x[k] + a_2*x[k]^2 - y[k])^2, k)
sum(a_0, k) + sum(a_1*x[k], k) + sum(a_2*x[k]^2, k) == sum(y[k], k)
sum(a_0*x[k], k) + sum(a_1*x[k]^2, k) + sum(a_2*x[k]^3, k) == sum(y[k]*x[k], k)
sum(a_0*x[k]^2, k) + sum(a_1*x[k]^3, k) + sum(a_2*x[k]^4, k) == sum(y[k]*x[k]^2, k)
A := [
    sum(1, k), sum(x[k], k), sum(x[k]^2, k);
    sum(x[k], k), sum(x[k]^2, k), sum(x[k]^3, k);
    sum(x[k]^2, k), sum(x[k]^3, k), sum(x[k]^4, k)
]
B := [sum(y[k], k); sum(y[k]*x[k], k); sum(y[k]*x[k]^2, k)]
[a_0; a_1; a_2] := A^-1*B = [-2.25; 4.25; -0.75]
A = [4, 10, 30; 10, 30, 100; 30, 100, 354]
Β[i] := sum(y[k]*x[k]^(i - 1), k)
Α[i, j] := sum(x[k]^(i - 1)*x[k]^(j - 1), k)
α := Α^-1*Β = [-11; 18.1667; -7; 0.833333]
f(x, a_0, a_1, a_2) := a_0 + a_1*x + a_2*x^2
φ(x, α) := sum(α[i]*x^(i - 1), i)
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Α := 0
Β := 0
m := 2
i := 1 .. m
j := 1 .. m
Β[i] := sum(y[k]*x[k]^(i - 1), k)
Α[i, j] := sum(x[k]^(i - 1)*x[k]^(j - 1), k)
Α = [4, 10; 10, 30]
Β = [11; 30]
α := Α^-1*Β = [1.5; 0.5]
φ(x, α) := sum(α[i]*x^(i - 1), i)
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A = [4, 10, 30; 10, 30, 100; 30, 100, 354]
B = [11; 30; 92]
m := 3
X := augment(x^0, x^1, x^2)
a := (transpose(X)*X)^-1*(transpose(X)*y) = [-2.25; 4.25; -0.75]
y = [1; 4; 3; 3]
X*a = [1.25; 3.25; 3.75; 2.75]
f(x, a) := sum(a[i]*x^(i - 1), i = 1 .. m)
Δ := f(x, a) - y
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|Δ| = 1.11803
Δ = [0.25; -0.75; 0.75; -0.25]
