ORIGIN ≡ 1
x := [1; 2; 3; 4]
y := [1; 4; 5; 3]
m := 3
X := augment(x^0, x^1, x^2)
a := (transpose(X)*X)^-1*(transpose(X)*y) = [-4.75; 6.95; -1.25]
f(x, a) := sum(a[i]*x^(i - 1), i = 1 .. m)
Δ := f(x, a) - y
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[
    mean(vectorize(|Δ|));
    Δ[match(max(vectorize(|Δ|)), vectorize(|Δ|))[1]];
    stdev(Δ);
    0.6745*stdev(Δ);
    mean(Δ)
] = [0.1; 0.15; 0.111803; 0.0754114; 2.4869e-14]
bias
