ORIGIN ≡ 1
x := [1.1; 1.3; 1.5; 1.7; 1.9; 2.1; 2.3; 2.5; 2.7; 2.9]
y := [0.1; 1.4; 3.4; 6.2; 10.7; 15.1; 19.6; 22.5; 25.9; 25.9]
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n := last(x) = 10
____________________________________________________________________
X := augment(x^0, x^1, x^2, x^3, x^4, x^5)
m := cols(X) = 6
j := 1 .. m
b := (transpose(X)*X)^-1*(transpose(X)*y)
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s_y := |X*b - y|/sqrt(n - m) = 0.429973
s_b := 0
s_b[j] := s_y*sqrt(((transpose(X)*X)^-1)[j, j])
b = [-34.4732; 114.15; -146.512; 86.4113; -21.6619; 1.88301]
s_b*qt(0.975, n - m) = [331.442; 921.468; 995.099; 522.586; 133.704; 13.3577]
s_b*qt(0.975, n - m)/|b| = [1.58688; 4.41181; 4.76434; 2.50204; 0.640147; 0.0639542]
____________________________________________________________________
X := augment(x^0, x^1, x^3, x^4, x^5)
m := cols(X) = 5
j := 1 .. m
b := (transpose(X)*X)^-1*(transpose(X)*y)
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s_y := |X*b - y|/sqrt(n - m) = 0.39253
s_b := 0
s_b[j] := s_y*sqrt(((transpose(X)*X)^-1)[j, j])
b = [14.0831; -21.3543; 9.55759; -2.06267; -0.065323]
s_b*qt(0.975, n - m) = [27.9311; 38.6662; 21.2125; 10.5815; 1.53983]
s_b*qt(0.975, n - m)/|b| = [1.01994; 1.41194; 0.7746; 0.386396; 0.0562285]
____________________________________________________________________
X := augment(x^0, x^3, x^4, x^5)
m := cols(X) = 4
j := 1 .. m
b := (transpose(X)*X)^-1*(transpose(X)*y)
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s_y := |X*b - y|/sqrt(n - m) = 0.424449
s_b := 0
s_b[j] := s_y*sqrt(((transpose(X)*X)^-1)[j, j])
b = [-1.29807; -2.04979; 3.67093; -0.889774]
s_b*qt(0.975, n - m) = [2.18068; 2.95449; 2.10605; 0.38858]
s_b*qt(0.975, n - m)/|b| = [0.485748; 0.658114; 0.469124; 0.0865565]
